# Udenfor temperature: outside := 10
# Indenfor temperature: inside := 14
# Ønsket temperature: ref := 15
# Kontrol metode:
ΔT := outside - inside = -4
error := (ref - inside) = 1
dir := (ΔT > 0) - (ΔT < 0) = -1
# Positive åbner vinduer | Negative lukker vinduer
opening := error*dir = -1
# Reference og indenfor er vigtigst, f.eks. hvis temperaturen udenfor er lavere end indenfor, og referencen er høj, skal vinduerne ikke åbnes.
